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/BATCH
/COM,ANSYS RELEASE 2019 R1           BUILD 19.3      UP20181204       10:22:35
/input,menust,tmp,''
/GST,ON
/PLO,INFO,3
/GRO,CURL,ON
/CPLANE,1
WPSTYLE,,,,,,,,0
/NOPR
KEYW,PR_SET,1
KEYW,PR_STRUC,1
KEYW,PR_THERM,0
KEYW,PR_FLUID,0
KEYW,PR_ELMAG,0
KEYW,MAGNOD,0
KEYW,MAGEDG,0
KEYW,MAGHFE,0
KEYW,MAGELC,0
KEYW,PR_MULTI,0
/GO
/COM,
/COM,Preferences for GUI filtering have been set to display:
/COM,  Structural
/PREP7
ET,1,PLANE183
KEYOPT,1,1,0
KEYOPT,1,3,2
KEYOPT,1,6,0
MPTEMP,,,,,,,,
MPTEMP,1,0
MPDATA,EX,1,,2.07E11
MPDATA,PRXY,1,,0.3
MPTEMP,,,,,,,,
MPTEMP,1,0
MPDATA,DENS,1,,7850
K,1,0,0,,
K,2,0,0.02229,,
K,3,0.0425,0.02229,,
K,3,0,0.0425,,
K,4,0.02,0.0425,,
K,5,0.0725,0,,
K,6,0.06,0,,
K,7,0.009926,0.02229,,
SAVE
K,8,0.03,0,,
K,9,0.02,0,,
SAVE
LSTR,       2,       7
LSTR,       2,       3
LSTR,       3,       4
LSTR,       5,       6
K,6,0.06,0,,
K,5,0.0725,0,,
RESUME
/COM,ANSYS RELEASE 2019 R1           BUILD 19.3      UP20181204       10:31:55
/NUMBER,0
K,5,0.0625,0,,
SAVE
RESUME
/COM,ANSYS RELEASE 2019 R1           BUILD 19.3      UP20181204       10:32:22
LSTR,       2,       3
LSTR,       3,       4
LSTR,       7,       2
LSTR,       5,       6
SAVE
LARC,7,6,8,0.03,
LARC,4,5,9,0.0425,
RESUME
/COM,ANSYS RELEASE 2019 R1           BUILD 19.3      UP20181204       10:34:29
/NUMBER,0
KPLOT
LARC,7,6,8,0.03,
LARC,4,5,9,0.0425,
LPLOT
SAVE
FLST,2,6,4
FITEM,2,3
FITEM,2,1
FITEM,2,5
FITEM,2,2
FITEM,2,6
FITEM,2,4
AL,P51X
SAVE
SMRT,6
SMRT,5
SMRT,4
SMRT,3
MSHAPE,0,2D
MSHKEY,0
CM,_Y,AREA
ASEL, , , ,       1
CM,_Y1,AREA
CHKMSH,'AREA'
CMSEL,S,_Y
AMESH,_Y1
CMDELE,_Y
CMDELE,_Y1
CMDELE,_Y2
SAVE
FLST,2,2,4,ORDE,2
FITEM,2,1
FITEM,2,4
DL,P51X, ,SYMM
FLST,2,1,4,ORDE,1
FITEM,2,2
/GO
SFL,P51X,PRES,10,
FINISH
/SOL
/STATUS,SOLU
SOLVE
FINISH
/POST1
PLDISP,0
PLDISP,1
PLDISP,2
! POST1
FINISH
/PREP7
LSCLEAR,ALL
SAVE
FLST,3,1,5,ORDE,1
FITEM,3,1
ARSYM,X,P51X, , , ,0,0
FLST,3,2,5,ORDE,2
FITEM,3,1
FITEM,3,-2
ARSYM,Y,P51X, , , ,0,0
SAVE
NUMMRG,ALL, , , ,LOW
APLOT
EPLOT
SAVE
/NUMBER,0
NUMSTR,DEFA
/NUMBER,0
SAVE
SAVE
FLST,2,2,4,ORDE,2
FITEM,2,15
FITEM,2,21
/GO
DL,P51X, ,UY,
FLST,2,2,4,ORDE,2
FITEM,2,2
FITEM,2,9
/GO
SFL,P51X,PRES,10,
FINISH
/SOL
ANTYPE,2
MODOPT,SUBSP,5
MXPAND,5, , ,1
LUMPM,0
PSTRES,0
FINISH
/PREP7
FLST,2,1,3,ORDE,1
FITEM,2,18
/GO
DK,P51X, , , ,0,UX, , , , , ,
FINISH
/SOL
MODOPT,SUBSP,5
MXPAND,5, , ,1
LUMPM,0
PSTRES,0
FINISH
/PREP7
LSCLEAR,ALL
SAVE
FLST,2,2,4,ORDE,2
FITEM,2,15
FITEM,2,21
/GO
DL,P51X, ,UY,
FLST,2,1,3,ORDE,1
FITEM,2,18
/GO
DK,P51X, , , ,0,UX, , , , , ,
FLST,2,2,4,ORDE,2
FITEM,2,2
FITEM,2,9
/GO
SFL,P51X,PRES,10E6,
SAVE
FINISH
/SOL
MODOPT,SUBSP,5
MXPAND,0, , ,0
LUMPM,0
PSTRES,0
MODOPT,SUBSP,5
MXPAND,5, , ,1
LUMPM,0
PSTRES,0
MODOPT,SUBSP,5,0,0, ,OFF
RIGID,
SUBOPT,STRMCHK,0
SUBOPT,MEMORY,AUTO
MODOPT,SUBSP,5
MXPAND,5, , ,1
LUMPM,0
PSTRES,0
MODOPT,SUBSP,5,0,0, ,OFF
RIGID,
SUBOPT,STRMCHK,0
SUBOPT,MEMORY,AUTO
/STATUS,SOLU
SOLVE
FINISH
/POST1
SAVE
SET,LIST
PLDISP,2
FINISH
/PREP7
NUMMRG,ALL, , , ,LOW
NUMMRG,ALL, , , ,LOW
LSCLEAR,ALL
LSCLEAR,ALL
FLST,2,2,4,ORDE,2
FITEM,2,15
FITEM,2,21
/GO
DL,P51X, ,UY,
FLST,2,1,3,ORDE,1
FITEM,2,18
/GO
DK,P51X, , , ,0,UX, , , , , ,
FLST,2,2,4,ORDE,2
FITEM,2,2
FITEM,2,9
/GO
SFL,P51X,PRES,10000000,
SAVE
FINISH
/SOL
/STATUS,SOLU
SOLVE
FINISH
/POST1
SET,LIST
PLDISP,2
FINISH
/PREP7
FLST,2,4,5,ORDE,2
FITEM,2,1
FITEM,2,-4
AADD,P51X
FLST,2,5,5,ORDE,2
FITEM,2,1
FITEM,2,-5
ACLEAR,P51X
FLST,2,5,5,ORDE,2
FITEM,2,1
FITEM,2,-5
AADD,P51X
SAVE
CM,_Y,AREA
ASEL, , , ,       5
CM,_Y1,AREA
CHKMSH,'AREA'
CMSEL,S,_Y
AMESH,_Y1
CMDELE,_Y
CMDELE,_Y1
CMDELE,_Y2
SAVE
FLST,2,2,4,ORDE,2
FITEM,2,2
FITEM,2,9
/GO
SFL,P51X,PRES,10000000,
FLST,2,2,4,ORDE,2
FITEM,2,15
FITEM,2,21
/GO
DL,P51X, ,UY,
FLST,2,1,3,ORDE,1
FITEM,2,18
/GO
DK,P51X, , , ,0,UX, , , , , ,
FINISH
/SOL
ANTYPE,2
MODOPT,SUBSP,5
MXPAND,0, , ,1
LUMPM,0
PSTRES,0
MODOPT,SUBSP,5,0,0, ,OFF
RIGID,
SUBOPT,STRMCHK,0
SUBOPT,MEMORY,AUTO
/STATUS,SOLU
SOLVE
FINISH
/POST1
SET,LIST
PLDISP,2
SET,NEXT
PLDISP,2
PLNS,S,EQV
ANMODE,10,0.5, ,0
SET,LIST
SET,FIRST
SAVE
PLNS,S,EQV
ANMODE,10,0.5, ,0
PLNS,EPTO,EQV
ANMODE,10,0.5, ,0
PLNS,NL,SEPL
ANMODE,10,0.5, ,0
SET,FIRST
RESUME
/COM,ANSYS RELEASE 2019 R1           BUILD 19.3      UP20181204       11:15:36
SET,FIRST
PLNS,NL,SEPL
ANMODE,10,0.5, ,0
SET,NEXT
SET,LIST
SAVE
SAVE
FINISH
! /EXIT,ALL
