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/BATCH
/COM,ANSYS RELEASE 2019 R1           BUILD 19.3      UP20181204       11:29:43
/input,menust,tmp,''
/GST,ON
/PLO,INFO,3
/GRO,CURL,ON
/CPLANE,1
WPSTYLE,,,,,,,,0
/NOPR
KEYW,PR_SET,1
KEYW,PR_STRUC,1
KEYW,PR_THERM,0
KEYW,PR_FLUID,0
KEYW,PR_ELMAG,0
KEYW,MAGNOD,0
KEYW,MAGEDG,0
KEYW,MAGHFE,0
KEYW,MAGELC,0
KEYW,PR_MULTI,0
/GO
/COM,
/COM,Preferences for GUI filtering have been set to display:
/COM,  Structural
SAVE
/PREP7
ET,1,PLANE183
KEYOPT,1,1,0
KEYOPT,1,3,0
KEYOPT,1,6,0
FINISH
/FILNAME,p2,1
/BATCH
/COM,ANSYS RELEASE 2019 R1           BUILD 19.3      UP20181204       11:31:43
RESUME,'p3','db','.'
/COM,ANSYS RELEASE 2019 R1           BUILD 19.3      UP20181204       11:31:43
/PREP7
MPTEMP,,,,,,,,
MPTEMP,1,0
MPDATA,EX,1,,2.1E11
MPDATA,PRXY,1,,0.3
MPTEMP,,,,,,,,
MPTEMP,1,0
MPDATA,DENS,1,,7850
SAVE
SAVE
ET,1,PLANE183
KEYOPT,1,1,0
KEYOPT,1,3,3
KEYOPT,1,6,0
R,1,0.02,
SAVE
SAVE
K,1,0,0,,
RECTNG,0,2,0,2,
/NUMBER,0
RESUME
/COM,ANSYS RELEASE 2019 R1           BUILD 19.3      UP20181204       11:45:50
/NUMBER,0
K,1,0,0,,
SAVE
FINISH
! /EXIT,ALL
